<?xml version="1.0"?>
<?xml-stylesheet type="text/xsl" href="http://jsbsim.sourceforge.net/JSBSim.xsl"?>

<!-- Eurofighter Typhoon Aerodynamics -->
<!-- Justin Nicholson (pinto), Joshua Davidson (Octal450) -->

<aerodynamics>

	<function name="aero/function/kCLge">
		<description>Lift factor due to ground effect</description>
		<table>
			<independentVar lookup="row">aero/h_b-mac-ft</independentVar>
			<tableData>
				0.00  1.15225
				0.10  1.09525
				0.15  1.06750
				0.20  1.05475
				0.30  1.04125
				0.40  1.03450
				0.50  1.01425
				0.60  1.00975
				0.70  1.00600
				0.80  1.00450
				0.90  1.00225
				1.00  1.00150
				1.10  1.00000
			</tableData>
		</table>
	</function>

	<function name="aero/function/kCDge">
		<description>Drag factor due to ground effect</description>
		<table>
			<independentVar lookup="row">aero/h_b-mac-ft</independentVar>
			<tableData>
				0.00  0.480
				0.10  0.515
				0.15  0.629
				0.20  0.709
				0.30  0.815
				0.40  0.882
				0.50  0.928
				0.60  0.962
				0.70  0.988
				0.80  1.000
			</tableData>
		</table>
	</function>

	<axis name="LIFT">

		<function name="aero/coefficient/CLalpha">
			<description>Lift due to alpha</description>
			<product>
				<property>aero/qbar-psf</property>
				<property>metrics/Sw-sqft</property>
				<property>aero/function/kCLge</property>
				<table>
					<independentVar lookup="row">aero/alpha-deg</independentVar>
					<tableData>
						-35 -1.52
						  0  0.01
						 15  0.72
						 35  1.20
						 40  0.70
						 50  1.03
						 90  0.00
					</tableData>
				</table>
				<property>tune/lift/alpha</property>
			</product>
		</function>

		<function name="aero/coefficient/CLq">
			<description>Lift due to pitch rate</description>
			<product>
				<property>aero/qbar-psf</property>
				<property>metrics/Sw-sqft</property>
				<property>velocities/q-aero-rad_sec</property>
				<property>aero/ci2vel</property>
				<value>0.3888</value>
				<property>tune/lift/pitch_rate</property>
			</product>
		</function>

		<function name="aero/coefficient/CLadot">
			<description>Lift due to alpha rate</description>
			<product>
				<property>aero/qbar-psf</property>
				<property>metrics/Sw-sqft</property>
				<property>aero/alphadot-rad_sec</property>
				<property>aero/ci2vel</property>
				<value>0.3699</value>
				<property>tune/lift/alpha_rate</property>
			</product>
		</function>

		<function name="aero/coefficient/CLslat_l">
			<description>Lift due to slat L</description>
			<product>
				<property>aero/qbar-psf</property>
				<property>metrics/Sw-sqft</property>
				<property>fcs/slat-L-deg</property>
				<property>aero/function/kCLge</property>
				<value>0.00498</value>
			</product>
		</function>

		<function name="aero/coefficient/CLslat_r">
			<description>Lift due to slat R</description>
			<product>
				<property>aero/qbar-psf</property>
				<property>metrics/Sw-sqft</property>
				<property>fcs/slat-R-deg</property>
				<property>aero/function/kCLge</property>
				<value>0.00498</value>
			</product>
		</function>

		<function name="aero/coefficient/CLdf_l">
			<description>Lift due to foreplane L</description>
			<product>
				<property>aero/qbar-psf</property>
				<property>metrics/Sw-sqft</property>
				<toradians><property>fcs/foreplane-L-deg</property></toradians>
				<value>0.0893</value>
			</product>
		</function>

		<function name="aero/coefficient/CLdf_r">
			<description>Lift due to foreplane R</description>
			<product>
				<property>aero/qbar-psf</property>
				<property>metrics/Sw-sqft</property>
				<toradians><property>fcs/foreplane-R-deg</property></toradians>
				<value>0.0893</value>
			</product>
		</function>

		<function name="aero/coefficient/CLde_1l">
			<description>Lift due to elevon 1L</description>
			<product>
				<property>aero/qbar-psf</property>
				<property>metrics/Sw-sqft</property>
				<toradians><property>fcs/elevon-1L-deg</property></toradians>
				<value>0.0883</value>
			</product>
		</function>

		<function name="aero/coefficient/CLde_2l">
			<description>Lift due to elevon 2L</description>
			<product>
				<property>aero/qbar-psf</property>
				<property>metrics/Sw-sqft</property>
				<toradians><property>fcs/elevon-2L-deg</property></toradians>
				<value>0.0903</value>
			</product>
		</function>

		<function name="aero/coefficient/CLde_2r">
			<description>Lift due to elevon 2R</description>
			<product>
				<property>aero/qbar-psf</property>
				<property>metrics/Sw-sqft</property>
				<toradians><property>fcs/elevon-2R-deg</property></toradians>
				<value>0.0903</value>
			</product>
		</function>

		<function name="aero/coefficient/CLde_1r">
			<description>Lift due to elevon 1R</description>
			<product>
				<property>aero/qbar-psf</property>
				<property>metrics/Sw-sqft</property>
				<toradians><property>fcs/elevon-1R-deg</property></toradians>
				<value>0.0883</value>
			</product>
		</function>

		<function name="aero/coefficient/CLdab">
			<description>Lift due to airbrake</description>
			<product>
				<property>aero/qbar-psf</property>
				<property>metrics/Sw-sqft</property>
				<property>fcs/airbrake-deg</property>
				<value>-0.000986</value>
			</product>
		</function>

	</axis>

	<axis name="DRAG">

		<function name="aero/coefficient/CD0">
			<description>Minimum drag</description>
			<product>
				<property>aero/qbar-psf</property>
				<property>metrics/Sw-sqft</property>
				<value>0.0268</value>
				<property>tune/drag/minimum</property>
			</product>
		</function>

		<function name="aero/coefficient/CDalpha">
			<description>Drag due to alpha</description>
			<product>
				<property>aero/qbar-psf</property>
				<property>metrics/Sw-sqft</property>
				<table>
					<independentVar lookup="row">aero/alpha-rad</independentVar>
					<tableData>
						-1.57  0.190
						-0.26  0.027
						 0.00  0.011
						 0.26  0.057
						 1.57  0.120
					</tableData>
				</table>
				<property>tune/drag/alpha</property>
			</product>
		</function>

		<function name="aero/coefficient/CDi">
			<description>Induced drag</description>
			<product>
				<property>aero/qbar-psf</property>
				<property>metrics/Sw-sqft</property>
				<property>aero/cl-squared</property>
				<property>aero/function/kCDge</property>
				<value>0.063461</value>
				<property>tune/drag/induced</property>
			</product>
		</function>

		<function name="aero/coefficient/CDmach">
			<description>Drag due to mach</description>
			<product>
				<property>aero/qbar-psf</property>
				<property>metrics/Sw-sqft</property>
				<table>
					<independentVar lookup="row">velocities/mach</independentVar>
					<tableData>
						0.00  0.000
						0.81  0.000
						1.10  0.023
						1.80  0.015
					</tableData>
				</table>
				<property>tune/drag/mach</property>
			</product>
		</function>

		<function name="aero/coefficient/CDbeta">
			<description>Drag due to sideslip</description>
			<product>
				<property>aero/qbar-psf</property>
				<property>metrics/Sw-sqft</property>
				<table>
					<independentVar lookup="row">aero/beta-rad</independentVar>
					<tableData>
						-1.57  1.23
						-0.26  0.05
						 0.00  0.00
						 0.26  0.05
						 1.57  1.23
					</tableData>
				</table>
				<property>tune/drag/beta</property>
			</product>
		</function>

		<function name="aero/coefficient/CDdf_l">
			<description>Drag due to foreplane L</description>
			<product>
				<property>aero/qbar-psf</property>
				<property>metrics/Sw-sqft</property>
				<abs><toradians><property>fcs/foreplane-L-deg</property></toradians></abs>
				<value>0.007</value>
			</product>
		</function>

		<function name="aero/coefficient/CDdf_r">
			<description>Drag due to foreplane R</description>
			<product>
				<property>aero/qbar-psf</property>
				<property>metrics/Sw-sqft</property>
				<abs><toradians><property>fcs/foreplane-R-deg</property></toradians></abs>
				<value>0.007</value>
			</product>
		</function>

		<function name="aero/coefficient/CDde_1l">
			<description>Drag due to elevon 1L</description>
			<product>
				<property>aero/qbar-psf</property>
				<property>metrics/Sw-sqft</property>
				<abs><toradians><property>fcs/elevon-1L-deg</property></toradians></abs>
				<value>0.005</value>
			</product>
		</function>

		<function name="aero/coefficient/CDde_2l">
			<description>Drag due to elevon 2L</description>
			<product>
				<property>aero/qbar-psf</property>
				<property>metrics/Sw-sqft</property>
				<abs><toradians><property>fcs/elevon-2L-deg</property></toradians></abs>
				<value>0.007</value>
			</product>
		</function>

		<function name="aero/coefficient/CDde_2r">
			<description>Drag due to elevon 2R</description>
			<product>
				<property>aero/qbar-psf</property>
				<property>metrics/Sw-sqft</property>
				<abs><toradians><property>fcs/elevon-2R-deg</property></toradians></abs>
				<value>0.007</value>
			</product>
		</function>

		<function name="aero/coefficient/CDde_1r">
			<description>Drag due to elevon 1R</description>
			<product>
				<property>aero/qbar-psf</property>
				<property>metrics/Sw-sqft</property>
				<abs><toradians><property>fcs/elevon-1R-deg</property></toradians></abs>
				<value>0.005</value>
			</product>
		</function>

		<function name="aero/coefficient/CDgear">
			<description>Drag due to gear</description>
			<product>
				<property>aero/qbar-psf</property>
				<property>metrics/Sw-sqft</property>
				<property>gear/gear-pos-norm</property>
				<value>0.01846</value>
			</product>
		</function>

		<function name="aero/coefficient/CDslat_l">
			<description>Drag due to slat L</description>
			<product>
				<property>aero/qbar-psf</property>
				<property>metrics/Sw-sqft</property>
				<property>fcs/slat-L-deg</property>
				<value>0.00151</value>
			</product>
		</function>

		<function name="aero/coefficient/CDslat_r">
			<description>Drag due to slat R</description>
			<product>
				<property>aero/qbar-psf</property>
				<property>metrics/Sw-sqft</property>
				<property>fcs/slat-R-deg</property>
				<value>0.00151</value>
			</product>
		</function>

		<function name="aero/coefficient/CDdab">
			<description>Drag due to airbrake</description>
			<product>
				<property>aero/qbar-psf</property>
				<property>metrics/Sw-sqft</property>
				<property>fcs/airbrake-deg</property>
				<value>0.00106</value>
			</product>
		</function>

	</axis>

	<axis name="SIDE">

		<function name="aero/coefficient/CYbeta">
			<description>Side force due to beta</description>
			<product>
				<property>aero/qbar-psf</property>
				<property>metrics/Sw-sqft</property>
				<property>aero/beta-rad</property>
				<value>-0.9765</value>
			</product>
		</function>

		<function name="aero/coefficient/CYp">
			<description>Side force due to roll rate</description>
			<product>
				<property>aero/qbar-psf</property>
				<property>metrics/Sw-sqft</property>
				<property>aero/bi2vel</property>
				<property>velocities/p-aero-rad_sec</property>
				<table>
					<independentVar lookup="row">aero/Re</independentVar>
					<tableData>
						103071296  0.2160
						113378416  0.0159
						154606944  0.0069
						206465920  0.0071
					</tableData>
				</table>
			</product>
		</function>

		<function name="aero/coefficient/CDr">
			<description>Side force due to yaw rate</description>
			<product>
				<property>aero/qbar-psf</property>
				<property>metrics/Sw-sqft</property>
				<property>aero/bi2vel</property>
				<property>velocities/r-aero-rad_sec</property>
				<value>1.246</value>
			</product>
		</function>

		<function name="aero/coefficient/CYdr">
			<description>Side force due to rudder</description>
			<product>
				<property>aero/qbar-psf</property>
				<property>metrics/Sw-sqft</property>
				<toradians><property>fcs/rudder-deg</property></toradians>
				<value>0.298</value>
			</product>
		</function>

	</axis>

	<axis name="ROLL">

		<function name="aero/coefficient/Clbeta">
			<description>Roll moment due to beta</description>
			<product>
				<property>aero/qbar-psf</property>
				<property>metrics/Sw-sqft</property>
				<property>metrics/bw-ft</property>
				<property>aero/beta-rad</property>
				<value>-0.0217</value>
			</product>
		</function>

		<function name="aero/coefficient/Clp">
			<description>Roll moment due to roll rate</description>
			<product>
				<property>aero/qbar-psf</property>
				<property>metrics/Sw-sqft</property>
				<property>metrics/bw-ft</property>
				<property>aero/bi2vel</property>
				<property>velocities/p-aero-rad_sec</property>
				<value>-0.397</value>
			</product>
		</function>

		<function name="aero/coefficient/Clr">
			<description>Roll moment due to yaw rate</description>
			<product>
				<property>aero/qbar-psf</property>
				<property>metrics/Sw-sqft</property>
				<property>metrics/bw-ft</property>
				<property>aero/bi2vel</property>
				<property>velocities/r-aero-rad_sec</property>
				<value>0.0876</value>
			</product>
		</function>

		<function name="aero/coefficient/Clde_1l">
			<description>Roll moment due to elevon 1L</description>
			<product>
				<property>aero/qbar-psf</property>
				<property>metrics/Sw-sqft</property>
				<property>metrics/bw-ft</property>
				<toradians><property>fcs/elevon-1L-deg</property></toradians>
				<value>0.0495</value>
			</product>
		</function>

		<function name="aero/coefficient/Clde_2l">
			<description>Roll moment due to elevon 2L</description>
			<product>
				<property>aero/qbar-psf</property>
				<property>metrics/Sw-sqft</property>
				<property>metrics/bw-ft</property>
				<toradians><property>fcs/elevon-2L-deg</property></toradians>
				<value>0.0595</value>
			</product>
		</function>

		<function name="aero/coefficient/Clde_2r">
			<description>Roll moment due to elevon 2R</description>
			<product>
				<property>aero/qbar-psf</property>
				<property>metrics/Sw-sqft</property>
				<property>metrics/bw-ft</property>
				<toradians><property>fcs/elevon-2R-deg</property></toradians>
				<value>-0.0595</value>
			</product>
		</function>

		<function name="aero/coefficient/Clde_1r">
			<description>Roll moment due to elevon 1R</description>
			<product>
				<property>aero/qbar-psf</property>
				<property>metrics/Sw-sqft</property>
				<property>metrics/bw-ft</property>
				<toradians><property>fcs/elevon-1R-deg</property></toradians>
				<value>-0.0495</value>
			</product>
		</function>

		<function name="aero/coefficient/Cldr">
			<description>Roll moment due to rudder</description>
			<product>
				<property>aero/qbar-psf</property>
				<property>metrics/Sw-sqft</property>
				<property>metrics/bw-ft</property>
				<toradians><property>fcs/rudder-deg</property></toradians>
				<value>0.0317</value>
			</product>
		</function>

	</axis>

	<axis name="PITCH">

		<function name="aero/coefficient/Cmalpha">
			<description>Pitching moment due to alpha</description>
			<product>
				<property>aero/qbar-psf</property>
				<property>metrics/Sw-sqft</property>
				<property>metrics/cbarw-ft</property>
				<table>
					<independentVar lookup="row">aero/alpha-deg</independentVar>
					<tableData>
						-30 -0.00106
						-15 -0.00051
						  0  0.00002
						 15  0.00062
						 30  0.00131
					</tableData>
				</table>
			</product>
		</function>

		<function name="aero/coefficient/Cmq">
			<description>Pitch moment due to pitch rate</description>
			<product>
				<property>aero/qbar-psf</property>
				<property>metrics/Sw-sqft</property>
				<property>metrics/cbarw-ft</property>
				<property>aero/ci2vel</property>
				<property>velocities/q-aero-rad_sec</property>
				<value>-9.3931</value>
			</product>
		</function>

		<function name="aero/coefficient/Cmadot">
			<description>Pitch moment due to alpha rate</description>
			<product>
				<property>aero/qbar-psf</property>
				<property>metrics/Sw-sqft</property>
				<property>metrics/cbarw-ft</property>
				<property>aero/ci2vel</property>
				<property>aero/alphadot-rad_sec</property>
				<value>-9.4976</value>
			</product>
		</function>

		<function name="aero/coefficient/Cmdf_l">
			<description>Pitch moment due to foreplane L</description>
			<product>
				<property>aero/qbar-psf</property>
				<property>metrics/Sw-sqft</property>
				<property>metrics/cbarw-ft</property>
				<toradians><property>fcs/foreplane-L-deg</property></toradians>
				<value>-0.5133</value>
			</product>
		</function>

		<function name="aero/coefficient/Cmdf_r">
			<description>Pitch moment due to foreplane R</description>
			<product>
				<property>aero/qbar-psf</property>
				<property>metrics/Sw-sqft</property>
				<property>metrics/cbarw-ft</property>
				<toradians><property>fcs/foreplane-R-deg</property></toradians>
				<value>-0.5133</value>
			</product>
		</function>

		<function name="aero/coefficient/Cmde_1l">
			<description>Pitch moment due to elevon 1L</description>
			<product>
				<property>aero/qbar-psf</property>
				<property>metrics/Sw-sqft</property>
				<property>metrics/cbarw-ft</property>
				<toradians><property>fcs/elevon-1L-deg</property></toradians>
				<value>-0.5033</value>
			</product>
		</function>

		<function name="aero/coefficient/Cmde_2l">
			<description>Pitch moment due to elevon 2L</description>
			<product>
				<property>aero/qbar-psf</property>
				<property>metrics/Sw-sqft</property>
				<property>metrics/cbarw-ft</property>
				<toradians><property>fcs/elevon-2L-deg</property></toradians>
				<value>0.5233</value>
			</product>
		</function>

		<function name="aero/coefficient/Cmde_2r">
			<description>Pitch moment due to elevon 2R</description>
			<product>
				<property>aero/qbar-psf</property>
				<property>metrics/Sw-sqft</property>
				<property>metrics/cbarw-ft</property>
				<toradians><property>fcs/elevon-2R-deg</property></toradians>
				<value>0.5233</value>
			</product>
		</function>

		<function name="aero/coefficient/Cmde_1r">
			<description>Pitch moment due to elevon 1R</description>
			<product>
				<property>aero/qbar-psf</property>
				<property>metrics/Sw-sqft</property>
				<property>metrics/cbarw-ft</property>
				<toradians><property>fcs/elevon-1R-deg</property></toradians>
				<value>-0.5033</value>
			</product>
		</function>

	</axis>

	<axis name="YAW">

		<function name="aero/coefficient/Cnbeta">
			<description>Yaw moment due to beta</description>
			<product>
				<property>aero/qbar-psf</property>
				<property>metrics/Sw-sqft</property>
				<property>metrics/bw-ft</property>
				<property>aero/beta-rad</property>
				<value>0.05896</value>
			</product>
		</function>

		<function name="aero/coefficient/Cnp">
			<description>Yaw moment due to roll rate</description>
			<product>
				<property>aero/qbar-psf</property>
				<property>metrics/Sw-sqft</property>
				<property>metrics/bw-ft</property>
				<property>aero/bi2vel</property>
				<property>velocities/p-rad_sec</property>
				<table>
					<independentVar lookup="row">aero/Re</independentVar>
					<tableData>
						17307328 -0.0749
						19038060 -0.0045
						25960990 -0.0016
						34828468 -0.0009
					</tableData>
				</table>
			</product>
		</function>

		<function name="aero/coefficient/Cnr">
			<description>Yaw moment due to yaw rate</description>
			<product>
				<property>aero/qbar-psf</property>
				<property>metrics/Sw-sqft</property>
				<property>metrics/bw-ft</property>
				<property>aero/bi2vel</property>
				<property>velocities/r-aero-rad_sec</property>
				<value>-0.356</value>
			</product>
		</function>

		<function name="aero/coefficient/Cndr">
			<description>Yaw moment due to rudder</description>
			<product>
				<property>aero/qbar-psf</property>
				<property>metrics/Sw-sqft</property>
				<property>metrics/bw-ft</property>
				<toradians><property>fcs/rudder-deg</property></toradians>
				<value>0.0594</value>
			</product>
		</function>

	</axis>

</aerodynamics>
