<?xml version="1.0"?>
<?xml-stylesheet type="text/xsl" href="http://jsbsim.sourceforge.net/JSBSim.xsl"?>

 <ground_reactions>

  <contact type="BOGEY" name="NOSE">
    <location unit="M">
      <x>    -2.67929 </x>
      <y>     0.00 </y>
      <z>   -2.13497 </z>
    </location>
    <static_friction>  0.80 </static_friction>
    <dynamic_friction> 0.50 </dynamic_friction>
    <rolling_friction> 0.02 </rolling_friction>
    <spring_coeff  unit="LBS/FT">     15578.33 </spring_coeff>
    <damping_coeff unit="LBS/FT/SEC"> 7789.16 </damping_coeff>
    <max_steer unit="DEG"> 5.00 </max_steer>
    <brake_group> NONE </brake_group>
    <retractable> 1 </retractable>
  </contact>

  <contact type="BOGEY" name="LEFT_MAIN">
    <location unit="M">
      <x>    1.42602 </x>
      <y>   -2.11708 </y>
      <z>   -1.87413 </z>
    </location>
    <static_friction>  0.80 </static_friction>
    <dynamic_friction> 0.50 </dynamic_friction>
    <rolling_friction> 0.02 </rolling_friction>
    <spring_coeff  unit="LBS/FT">     51927.75 </spring_coeff>
    <damping_coeff unit="LBS/FT/SEC"> 25963.88 </damping_coeff>
    <max_steer unit="DEG">0</max_steer>
    <brake_group> LEFT </brake_group>
    <retractable> 1 </retractable>
  </contact>

  <contact type="BOGEY" name="RIGHT_MAIN">
    <location unit="M">
      <x>    1.42602 </x>
      <y>    2.11708 </y>
      <z>   -1.87413 </z>
    </location>
    <static_friction>  0.80 </static_friction>
    <dynamic_friction> 0.50 </dynamic_friction>
    <rolling_friction> 0.02 </rolling_friction>
    <spring_coeff  unit="LBS/FT">     51927.75 </spring_coeff>
    <damping_coeff unit="LBS/FT/SEC"> 25963.88 </damping_coeff>
    <max_steer unit="DEG">0</max_steer>
    <brake_group> RIGHT </brake_group>
    <retractable> 1 </retractable>
  </contact>

  <!--<contact type="STRUCTURE" name="LEFT_WING">
    <location unit="IN">
     <x>   377.01 </x>
     <y>  -215.55 </y>
     <z>   -15.71 </z>
    </location>
   <static_friction>  1 </static_friction>
   <dynamic_friction> 1 </dynamic_friction>
   <spring_coeff unit="LBS/FT">      51927.75 </spring_coeff>
   <damping_coeff unit="LBS/FT/SEC"> 51927.75 </damping_coeff>
  </contact>

  <contact type="STRUCTURE" name="RIGHT_WING">
    <location unit="IN">
     <x>   377.01 </x>
     <y>   215.55 </y>
     <z>   -15.71 </z>
    </location>
   <static_friction>  1 </static_friction>
   <dynamic_friction> 1 </dynamic_friction>
   <spring_coeff unit="LBS/FT">      51927.75 </spring_coeff>
   <damping_coeff unit="LBS/FT/SEC"> 51927.75 </damping_coeff>
  </contact>-->

 </ground_reactions>
