<?xml version="1.0"?>
<?xml-stylesheet type="text/xsl" href="http://jsbsim.sourceforge.net/JSBSim.xsl"?>

<fdm_config name="typhoon" version="2.0" release="ALPHA"
   xmlns:xsi="http://www.w3.org/2001/XMLSchema-instance"
   xsi:noNamespaceSchemaLocation="http://jsbsim.sourceforge.net/JSBSim.xsd">

 <fileheader>
  <author> Aeromatic v 3.3.10 </author>
  <filecreationdate> 08 Dec 2018 </filecreationdate>
  <version>$Revision: 1.80 $</version>
  <description> Models a typhoon. </description>
 </fileheader>

 <metrics>
   <wingarea  unit="FT2">   538.20 </wingarea>
   <wingspan  unit="FT" >    35.93 </wingspan>
   <wing_incidence unit="DEG"> 2.00 </wing_incidence>
   <chord     unit="FT" >    87.43 </chord>
   <htailarea unit="FT2">   107.64 </htailarea>
   <htailarm  unit="FT" >    20.94 </htailarm>
   <vtailarea  unit="FT2">   64.58 </vtailarea>
   <vtailarm  unit="FT" >    20.94 </vtailarm>
   <location name="AERORP" unit="M">
     <x>    1.00603 </x>
     <y>       0.00 </y>
     <z>  -0.240554 </z>
   </location>
   <location name="EYEPOINT" unit="M">
     <x>   -3.87599 </x>
     <y>       0.00 </y>
     <z>    1.25469 </z>
   </location>
   <location name="VRP" unit="M">
     <x>     0.0 </x>
     <y>     0.0 </y>
     <z>     0.0 </z>
   </location>
 </metrics>

 <mass_balance>
   <ixx unit="SLUG*FT2">  20430.65 </ixx>
   <iyy unit="SLUG*FT2">  59659.78 </iyy>
   <izz unit="SLUG*FT2">  61658.53 </izz>
   <emptywt unit="LBS" >  24243.97 </emptywt>
   <location name="CG" unit="IN">
     <x>    0.90603 </x>
     <y>       0.00 </y>
     <z>  -0.140554 </z>
   </location>
 </mass_balance>

 <propulsion file="Aero/typhoon-propulsion.xml"/>

 <ground_reactions file="Aero/typhoon-ground-reactions.xml"/>

 <system file="Propulsion.xml"/>
 <system file="Aircraft control.xml"/>
 <system file="Landing Gear.xml"/>
 <system file="Speedbrake.xml"/>
 <system file="Arrestor Hook.xml"/>
 <system file="Drag Chute.xml"/>

 <flight_control name="none"/>

 <aerodynamics file="Aero/typhoon-aero.xml"/>

 <external_reactions file="Aero/typhoon-external-forces.xml"/>

</fdm_config>
